OpenVSP model (file version 5), 9 components.
Geometry view with OpenVSP parameter names; values to 6 digits, angles in degrees, lengths in the model's unit.
Overall bounding box: X_Min=0 X_Len=0.68 Y_Min=-0.176 Y_Len=0.352 Z_Min=-0.176 Z_Len=0.352

Fuselage "Fuselage"
  location (X Y Z) 0 0 0, rotation 0 0 0
  bounding box size 0.68 0.1413 0.1413
  Design: Length=0.68
  cross sections:
    n   XLocPercent  YLocPercent  ZLocPercent  shape
    0   0            0            0            ellipse Ellipse_Height=0.03 Ellipse_Width=0.03
    1   0.25         0            0            ellipse Ellipse_Height=0.0560453 Ellipse_Width=0.0560453
    2   0.5          0            0            ellipse Ellipse_Height=0.115436 Ellipse_Width=0.115436
    3   0.500008     0            0            ellipse Ellipse_Height=0.140703 Ellipse_Width=0.140703
    4   0.500015     0            0            ellipse Ellipse_Height=0.1413 Ellipse_Width=0.1413
    5   0.500031     0            0            as above
    6   0.500061     0            0            as above
    7   0.500122     0            0            as above
    8   0.500244     0            0            as above
    9   0.500488     0            0            as above
    10  0.500977     0            0            as above
    11  0.501953     0            0            as above
    12  0.503906     0            0            as above
    13  0.507812     0            0            as above
    14  0.515625     0            0            as above
    15  0.53125      0            0            ellipse Ellipse_Height=0.136679 Ellipse_Width=0.136679
    16  0.5625       0            0            ellipse Ellipse_Height=0.112509 Ellipse_Width=0.112509
    17  0.625        0            0            ellipse Ellipse_Height=0.0883396 Ellipse_Width=0.0883396
    18  0.75         0            0            ellipse Ellipse_Height=0.0641698 Ellipse_Width=0.0641698
    19  1            0            0            ellipse Ellipse_Height=0.04 Ellipse_Width=0.04

Wing "Fin_Right", child of "Fuselage"
  location (X Y Z) 0.53 0 0, rotation 0 0 0
  bounding box size 0.08 0.16 0.0064077
  totals: TotalSpan=0.16 TotalProjectedSpan=0.16 TotalChord=0.08 TotalArea=0.0128 TotalAR=2 MAC=0.08
  root: chord 0.08, twist 0, NACA 4-series Camber=0 CamberLoc=0.2 ThickChord=0.08
  sections:
    n  Span  Root_Chord  Tip_Chord  Area    Sweep  Sweep_Location  Dihedral  Twist  Twist_Location  tip airfoil
    1  0.16  0.08        0.08       0.0128  0      0               0         0      0.25            as above

Wing "Fin_Top", child of "Fuselage"
  location (X Y Z) 0.53 0 0, rotation 90 0 0
  bounding box size 0.08 0.0064077 0.16
  totals: TotalSpan=0.16 TotalProjectedSpan=0.16 TotalChord=0.08 TotalArea=0.0128 TotalAR=2 MAC=0.08
  root: chord 0.08, twist 0, NACA 4-series Camber=0 CamberLoc=0.2 ThickChord=0.08
  sections:
    n  Span  Root_Chord  Tip_Chord  Area    Sweep  Sweep_Location  Dihedral  Twist  Twist_Location  tip airfoil
    1  0.16  0.08        0.08       0.0128  0      0               0         0      0.25            as above

Wing "Fin_Left", child of "Fuselage"
  location (X Y Z) 0.53 0 0, rotation 180 0 0
  bounding box size 0.08 0.16 0.0064077
  totals: TotalSpan=0.16 TotalProjectedSpan=0.16 TotalChord=0.08 TotalArea=0.0128 TotalAR=2 MAC=0.08
  root: chord 0.08, twist 0, NACA 4-series Camber=0 CamberLoc=0.2 ThickChord=0.08
  sections:
    n  Span  Root_Chord  Tip_Chord  Area    Sweep  Sweep_Location  Dihedral  Twist  Twist_Location  tip airfoil
    1  0.16  0.08        0.08       0.0128  0      0               0         0      0.25            as above

Wing "Fin_Bottom", child of "Fuselage"
  location (X Y Z) 0.53 0 0, rotation -90 0 0
  bounding box size 0.08 0.0064077 0.16
  totals: TotalSpan=0.16 TotalProjectedSpan=0.16 TotalChord=0.08 TotalArea=0.0128 TotalAR=2 MAC=0.08
  root: chord 0.08, twist 0, NACA 4-series Camber=0 CamberLoc=0.2 ThickChord=0.08
  sections:
    n  Span  Root_Chord  Tip_Chord  Area    Sweep  Sweep_Location  Dihedral  Twist  Twist_Location  tip airfoil
    1  0.16  0.08        0.08       0.0128  0      0               0         0      0.25            as above

Fuselage "Pod_Right"
  location (X Y Z) 0.52 0.16 0, rotation 0 0 0
  bounding box size 0.09 0.032 0.032
  Design: Length=0.09
  cross sections:
    n  XLocPercent  YLocPercent  ZLocPercent  shape
    0  0            0            0            ellipse Ellipse_Height=0.001 Ellipse_Width=0.001
    1  0.25         0            0            ellipse Ellipse_Height=0.032 Ellipse_Width=0.032
    2  0.5          0            0            as above
    3  0.75         0            0            as above
    4  1            0            0            ellipse Ellipse_Height=0.0224 Ellipse_Width=0.0224

Fuselage "Pod_Left"
  location (X Y Z) 0.52 -0.16 0, rotation 0 0 0
  bounding box size 0.09 0.032 0.032
  Design: Length=0.09
  cross sections:
    n  XLocPercent  YLocPercent  ZLocPercent  shape
    0  0            0            0            ellipse Ellipse_Height=0.001 Ellipse_Width=0.001
    1  0.25         0            0            ellipse Ellipse_Height=0.032 Ellipse_Width=0.032
    2  0.5          0            0            as above
    3  0.75         0            0            as above
    4  1            0            0            ellipse Ellipse_Height=0.0224 Ellipse_Width=0.0224

Fuselage "Pod_Top"
  location (X Y Z) 0.52 0 0.16, rotation 0 0 0
  bounding box size 0.09 0.032 0.032
  Design: Length=0.09
  cross sections:
    n  XLocPercent  YLocPercent  ZLocPercent  shape
    0  0            0            0            ellipse Ellipse_Height=0.001 Ellipse_Width=0.001
    1  0.25         0            0            ellipse Ellipse_Height=0.032 Ellipse_Width=0.032
    2  0.5          0            0            as above
    3  0.75         0            0            as above
    4  1            0            0            ellipse Ellipse_Height=0.0224 Ellipse_Width=0.0224

Fuselage "Pod_Bottom"
  location (X Y Z) 0.52 0 -0.16, rotation 0 0 0
  bounding box size 0.09 0.032 0.032
  Design: Length=0.09
  cross sections:
    n  XLocPercent  YLocPercent  ZLocPercent  shape
    0  0            0            0            ellipse Ellipse_Height=0.001 Ellipse_Width=0.001
    1  0.25         0            0            ellipse Ellipse_Height=0.032 Ellipse_Width=0.032
    2  0.5          0            0            as above
    3  0.75         0            0            as above
    4  1            0            0            ellipse Ellipse_Height=0.0224 Ellipse_Width=0.0224
